*Heading
** Job name: SingleCrack_sub Model name: Model-1
** Generated by: Abaqus/CAE 6.14-1
*Preprint, echo=NO, model=NO, history=NO, contact=NO
**
** PARTS
**
*Part, name=Part-1
*Node
      1,          0.5, -0.0850000009
      2, -0.0500000007, -0.0850000009
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**Triangular element U1, quadrilateral element U2
*********************** TRIANGULAR ****************************
*User element, nodes=3, type=U1, properties=5, coordinates=2, VARIABLES=9
1,2
1,4
***************************************************************
*********************** RECTENGULAR ***************************
*User element, nodes=4, type=U2, properties=5, coordinates=2, VARIABLES=12
1,2
1,4
***************************************************************
***************************************************************
*Element, type=U1
1, 4280, 4195, 4163
2, 7305, 3899, 1982
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***************************************************************
*Element, type=U2
491, 4385, 4386,  797, 798
492, 2638, 4809, 3108, 777
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**
**  umat for visualization (UEL)
********************* UMAT tri ***********************************
*Element, type=CPE3
12571, 4280, 4195, 4163
12572, 7305, 3899, 1982
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********************* UMAT quad ***********************************
*Element, type=CPE4
13061, 4385, 4386,  797, 798
13062, 2638, 4809, 3108, 777
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**
** non umat for linear elastic model
********************* non UMAT tri ***********************************
*Element, type=CPE3
25141, 1138, 1088, 1087
25142, 1205, 1147, 1204
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********************* non UMAT quad ***********************************
*Element, type=CPE4
25251, 903, 112, 113, 910
25252, 67, 902, 900, 66
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***************************************************************
*Elset, elset=elastic, generate
25141, 26402, 1
*Elset, elset=uel_sample
1,  2,  3,  4,  5,  6
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*Elset, elset=tran
25165, 25166, 25167, 25168, 25169, 25170
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*Elset, elset=umatelem, generate
12571, 25140, 1
***************************************************************
********************** ASSIGNING MATERIAL PROP ****************
***************************************************************
*Uel property, elset=uel_sample
210000, 0.3, 0, 0.0075, 2.7
**E, nu, at, lc, gc
***************************************************************
*Solid Section, elset=elastic, material=elastic
,
** Section: Section-elastic
*Solid Section, elset=tran, material=elastic
,
** Section: Section-uel
*Solid Section, elset=umatelem, material=uelmat
1.0
*End Part
**
**
** ASSEMBLY
**
*Assembly, name=Assembly
**
*Instance, name=Part-1-1, part=Part-1
*End Instance
**
*Node
      1,           0.,  0.550000012,           0.
*Nset, nset=BTM, instance=Part-1-1
   5,   6,  74,  75,  76,  77
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*Elset, elset=BTM, instance=Part-1-1
25260, 25262, 25264, 25266, 25267, 25269
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*Nset, nset=BTM_L, instance=Part-1-1
 5,
*Nset, nset=BTM_R, instance=Part-1-1
 6,
*Nset, nset=RP
 1,
*Nset, nset=Set-6, instance=Part-1-1
    1,    2,    3,    7,    8,    9
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*Elset, elset=Set-6, instance=Part-1-1
25165, 25166, 25167, 25168, 25169, 25170
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*Nset, nset=TOP, instance=Part-1-1
  10,  11, 151, 152, 153, 154
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*Elset, elset=TOP, instance=Part-1-1
25826, 25827, 25831, 25835, 25836, 25837
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*Nset, nset=transition, instance=Part-1-1
    1,    2,    3,    7,    8,    9
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*Elset, elset=transition, instance=Part-1-1
25165, 25166, 25167, 25168, 25169, 25170
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** Constraint: Constraint-1
*Equation
2
TOP, 2, 1.
RP, 2, -1.
**
*Elset, elset=umatelem, instance=Part-1-1, generate
12571, 25140, 1
*Elset, elset=allelem, instance=Part-1-1, generate
12571, 26459, 1
**
*End Assembly
***************************************************************
**
** MATERIALS
**
*Material, name=elastic
*Elastic
210000., 0.3
*Material, name=uelmat
*Depvar
      3,
*User Material, constants=1
0.,
**
** BOUNDARY CONDITIONS
**
** Name: pre-load Type: Displacement/Rotation
*Boundary
transition, 4, 4
** ----------------------------------------------------------------
**
** STEP: Step-1
**
*Step, name=Step-1, nlgeom=NO, inc=1000
*Static
0.01, 1., 1e-09, 0.01
*Solution Technique, type=QUASI-NEWTON, reform kernel=25
**
** BOUNDARY CONDITIONS
**
** Name: BTM_FIX Type: Displacement/Rotation
*Boundary
BTM, 1, 1
BTM, 2, 2
** Name: LOAD Type: Displacement/Rotation
*Boundary
RP, 1, 1
RP, 2, 2, 0.008
** Name: pre-load Type: Displacement/Rotation
*Boundary
transition, 4, 4
**
** CONTROLS
**
*Controls, reset
*Controls, parameters=time incrementation
10000, 10000, 8000, 1000, 5000, 5, , 10, , ,
**
** OUTPUT REQUESTS
**
*Restart, write, frequency=0
**
** FIELD OUTPUT: F-Output-1
**
*Output, field
*Node Output
RF, U, A, V
*Element Output, elset=allelem, directions=YES
SDV,
**
** HISTORY OUTPUT: H-Output-1
**
*element output, elset=umatelem
SDV
*Element Output, elset=umatelem, Position=Integration Points
COORD, IVOL
**
*Output, history, variable=PRESELECT
*End Step
